// COMSOL Multiphysics 6.1.0.357 model "COMSOL_3D_CMUT_withMedium_square.mph"
// Outline of the model tree

Parameters
  Voltage = 50
  Active_L = 150e-6
  Active_W = 150e-6
  Membrane_t = 4.9e-6  // Electrostrictive coupling coefficient
  L_mesh_size = 2e-6
  Si_t = 1e-6
  Membrane_t_mesh_size = 1e-6
  W_mesh_size = 1e-6
  Gap_t = 500e-9
  SiO2_t = 360e-9  // Electrostrictive coupling coefficient
  SiO2_t_mesh_size = 100e-9
  Gap_t_mesh_Size = 100e-9
  r_med = 0.55*sqrt(Active_W^2 + Active_L^2)
  d_med = r_med+1e-5
  p_med = 101e3
  VacAmp = 5

Common definitions
  free1: DeformingDomain on domains 3 | smoothingType = hyperelastic
  sym1: Symmetry "Symmetry/Roller 1" on boundaries 8
  sym2: Symmetry "Symmetry/Roller 2" on boundaries 7

Geometry
  geom1 "Geometry 1" (3D, length unit m)
    blk2: Block "Base Si" | pos = {0, 0, -Si_t - SiO2_t - Gap_t - Membrane_t}; size = {Active_W/2, Active_L/2, Si_t}
    blk3: Block "Oxide" | pos = {0, 0, - SiO2_t - Gap_t - Membrane_t}; size = {Active_W/2, Active_L/2, SiO2_t}
    blk4: Block "Vac Gap" | pos = {0, 0, - Gap_t - Membrane_t}; size = {Active_W/2, Active_L/2, Gap_t}
    blk5: Block "Membrane" | pos = {0, 0, - Membrane_t}; size = {Active_W/2, Active_L/2, Membrane_t}
    sph1: Sphere | r = r_med
    blk6: Block | pos = {-d_med, -d_med, 0}; size = {2*d_med, d_med, d_med}
    blk7: Block | pos = {-d_med, -d_med, -d_med}; size = {2*d_med, 2*d_med, d_med}
    blk8: Block | pos = {-d_med, 0, 0}; size = {d_med, d_med, d_med}
    dif1: Difference | input = sph1; input2 = blk6, blk7, blk8
    fin: Finalize "Form Union"

Materials
  mat3: Common "Perfect vacuum" on domains 3
    def "Basic"
      density = 0
      relpermeability = 1
      relpermittivity = 1
      electricconductivity = 0
  mat5: Common "Silica glass" on domains 2
    def "Basic"
      relpermeability = 1
      electricconductivity = 1e-14[S/m]
      thermalexpansioncoefficient = 0.55e-6[1/K]
      heatcapacity = 703[J/(kg*K)]
      relpermittivity = 3.75
      density = 2203[kg/m^3]
      thermalconductivity = 1.38[W/(m*K)]
    Enu "Young's modulus and Poisson's ratio"
      E = 73.1[GPa]
      nu = 0.17
    RefractiveIndex
      n = 1.45
      ki = 0
  mat6: Common "Air" on domains 5
    def "Basic"
      thermalexpansioncoefficient = alpha_p(pA,T)
      molarmass = 0.02897[kg/mol]
      bulkviscosity = muB(T)
      relpermeability = 1
      relpermittivity = 1
      dynamicviscosity = eta(T)
      ratioofspecificheat = 1.4
      electricconductivity = 0[S/m]
      heatcapacity = Cp(T)
      density = rho(pA,T)
      thermalconductivity = k(T)
      soundspeed = cs(T)
      eta: Piecewise | arg = T; pieces = {200.0, 1600.0, -8.38278E-7+8.35717342E-8*T^1-7.69429583E-11*T^2+4.6437266E-14*T^3-1.06585607E-17*T^4}; argunit = K; fununit = Pa*s
      Cp: Piecewise | arg = T; pieces = {200.0, 1600.0, 1047.63657-0.372589265*T^1+9.45304214E-4*T^2-6.02409443E-7*T^3+1.2858961E-10*T^4}; argunit = K; fununit = J/(kg*K)
      rho: Analytic | expr = pA*0.02897/R_const[K*mol/J]/T; args = {pA, T}; fununit = kg/m^3; argunit = {Pa, K}
      k: Piecewise | arg = T; pieces = {200.0, 1600.0, -0.00227583562+1.15480022E-4*T^1-7.90252856E-8*T^2+4.11702505E-11*T^3-7.43864331E-15*T^4}; argunit = K; fununit = W/(m*K)
      cs: Analytic | expr = sqrt(1.4*R_const[K*mol/J]/0.02897*T); args = T; fununit = m/s; argunit = K
      an1: Analytic | funcname = alpha_p; expr = -1/rho(pA,T)*d(rho(pA,T),T); args = {pA, T}; fununit = 1/K; argunit = {Pa, K}
      an2: Analytic "Analytic 2a" | funcname = muB; expr = 0.6*eta(T); args = T; fununit = Pa*s; argunit = K
    RefractiveIndex
      n = 1
      ki = 0
    NonlinearModel
      BA = (def.gamma+1)/2
    idealGas
      Rs = R_const/Mn
      heatcapacity = Cp(T)
      ratioofspecificheat = 1.4
      molarmass = 0.02897
      Cp: Piecewise | arg = T; pieces = {200.0, 1600.0, 1047.63657-0.372589265*T^1+9.45304214E-4*T^2-6.02409443E-7*T^3+1.2858961E-10*T^4}; argunit = K; fununit = J/(kg*K)
  mat7: Common "Silicon" on domains 1, 4
    def "Basic"
      relpermeability = 1
      electricconductivity = 1e-12[S/m]
      thermalexpansioncoefficient = 2.6e-6[1/K]
      heatcapacity = 700[J/(kg*K)]
      relpermittivity = 11.7
      density = 2329[kg/m^3]
      thermalconductivity = 130[W/(m*K)]
    Enu "Young's modulus and Poisson's ratio"
      E = 170[GPa]
      nu = 0.28
    RefractiveIndex
      n = 3.48
      ki = 0

Physics
  acpr: PressureAcoustics "Pressure Acoustics, Frequency Domain" on domains 5
    dependent variable p
    MeshControl.SizeControlParameter = Frequency
    MeshControl.PhysicsControlledMeshMaximumFrequency = 15[MHz]
    fpam1: FrequencyPressureAcousticsModel "Pressure Acoustics 1" (default)
      FluidModel = AtmosphereAttenuation
      minput_relativehumidity = 0.5
    shb1: SoundHard "Sound Hard Boundary (Wall) 1" (default)
    init1: init "Initial Values 1" (default) | p = p_med
    sym1: Symmetry on boundaries 13
    sym2: Symmetry on boundaries 14
    pmb1: PerfectlyMatchedBoundary on boundaries 16
    efc1: ExteriorFieldCalculation on boundaries 16
  solid: SolidMechanics on domains 1-4
    dependent variable u = {u, v, w}
    lemm1: LinearElasticModel "Linear Elastic Material 1" (default)
    free1: Free (default)
    init1: init "Initial Values 1" (default)
    fix1: Fixed "Fixed Constraint 1" on boundaries 3, 17, 18, 20, 22, 23, 25
    sym1: SymmetrySolid "Symmetry 1" on boundaries 1, 4, 10, 13
    sym2: SymmetrySolid "Symmetry 2" on boundaries 2, 5, 11, 14
    bndl1: BoundaryLoad on boundaries 15 | LoadType = FollowerPressure; FollowerPressure = p_med
  es: Electrostatics on domains 1-4
    dependent variable V
    ccn1: ChargeConservation "Charge Conservation, Solid" (default) | materialType = solid
    zc1: ZeroCharge (default)
    init1: init "Initial Values 1" (default)
    ccn2: ChargeConservation "Charge Conservation gap" on domains 3
    term1: DomainTerminal "gnd" on domains 4 | TerminalType = Voltage; V0 = 0
    term2: DomainTerminal "sig" on domains 1 | TerminalType = Voltage; V0 = Voltage
      hp1: HarmonicPerturbation on all domains | V0 = VacAmp

Multiphysics
  asb1: AcousticStructureBoundary on boundaries 1-25 | Acoustics_physics = acpr; Structure_physics = solid
  eme1: ElectromechanicalForces on all domains | Solid_physics = solid; Electrostatics_physics = es

Mesh
  mesh1 "Mesh 1"
    size: MeshSizeDefault | hmax = 1.23E-5; hgrad = 1.5
    size1: Size on domains 5 | hmin = 1.2340E-9; custom = on
    se1: SizeExpression on domains 5
      evaltype = initialexpression
      sizeexpr = subst(real(acpr.c_c),acpr.freq,acpr.freqmax)/acpr.freqmax/5
      cellsize = 4.94E-6
      solution = sol1
      weights = 1
      horder = 0
      studystep = frlin
      solupdatenum = 2
    ftet1: FreeTet "Free Tetrahedral 1" on remaining entities | optcurved = on
    bl1: BndLayer "Boundary Layers 1" on domains 5 | sharpcorners = trim
      blp1: BndLayerProp "Boundary Layer Properties 1" on boundaries 16
        blnlayers = 1
        blhmin = 8.61E-6
        blhtot = 8.61E-6

Studies
  std1 "Study 1"
    param: Parametric "Parametric Sweep" | sweeptype = filled; pname = {Voltage, VacAmp}; plistarr = {50, 5}; punit = {, }
    stat: Stationary
    frlin: Frequencylinearized "Frequency Domain Perturbation"
      punit = MHz
      plist = 10^(range(-0.8,0.15,1))
      linpsolnum = all

Solver configurations
  sol1 "Solution 1" (study std1)
    v1: Variables "Dependent Variables 1"
      comp1_spatial_disp: Field "Spatial mesh displacement (comp1.spatial.disp)"
        scalemethod = manual
        scaleval = 1e-2*0.000206059727767
      comp1_u: Field "Displacement field (comp1.u)" | scalemethod = manual; scaleval = 1e-2*0.000206059727767
    s1: Stationary "Stationary Solver 1"
      dDef: Direct
      se1: Segregated
        ss1: SegregatedStep "Merged variables" | segvar = {comp1_u, comp1_V}; linsolver = dDef
        ss2: SegregatedStep "Spatial frame coordinates" | segvar = {comp1_spatial_disp}; linsolver = dDef
    su1: StoreSolution "Solution Store 1"
    v2: Variables "Dependent Variables 2" | initmethod = sol; notsolmethod = sol
      comp1_spatial_disp: Field "Spatial mesh displacement (comp1.spatial.disp)"
        scalemethod = manual
        scaleval = 5.74288373676e-07
    s2: Stationary "Stationary Solver 2" | nonlin = linper; linpmethod = sol; linpsolnum = all; storelinpoint = on
      p1: Parametric | pname = freq; plistarr = 10^(range(-0.8,0.15,1)); punit = MHz; pcontinuationmode = no
      fc1: FullyCoupled | linsolver = d1
      d1: Direct "Suggested Direct Solver (eme1_asb1) (merged)"
  sol3 "Parametric Solutions 1" (study std1)
  sol2 "Solution Store 1" (study std1)

Datasets
  dset1: Solution | solution = sol1
  dset2: Solution | solution = sol2
  dset3: Solution | solution = sol3
  cpl1: CutPlane
    data = dset3
    quickplane = xy
    genmethod = pointnormal
    genpoints = {{0, 0, 0}, {Active_W/2, 0, 0}, {0, Active_L/2, 0}}
    spacevars = {cpl1x, cpl1y}

Derived values
  int1: IntSurface "Surface Integration 1" | data = cpl1; table = tbl4; expr = acpr.Iz; descr = Intensity, z-component
  int2: IntSurface "Surface Integration 2" on boundaries 15
    data = dset3
    table = tbl5
    expr = {abs(acpr.v_tz)^2, acpr.v_tz^2, 1, acpr.v_inst^2}
    unit = {m^4/s^2, m^4/s^2, m^2, m^4/s^2}
  int3: IntSurface "Surface Integration 3" on boundaries 15
    data = dset3
    table = tbl6
    expr = {0.5*imag(conj(acpr.v_tz)*acpr.p_t), 0.5*real(conj(acpr.v_tz)*acpr.p_t), acpr.Iz}
    unit = {W, W, W}
    descr = {, , "Intensity, z-component"}
  av1: AvSurface "Surface Average 1" on boundaries 15 | data = dset3; table = new; expr = abs(acpr.v_tz)
  int4: IntSurface "Surface Integration 4" on boundaries 15 | data = dset3; table = tbl7; expr = {abs(acpr.v_tz), 1}

Tables
  tbl1: Table (disabled)
    // Surface Integration 1
    Voltage | VacAmp | freq (MHz) | Intensity, z-component (W) | Intensity, z-component (W) | Intensity, z-component (W)
    50 | 5 | 0.1 | 6.08402e-11 | 6.08402e-11 | 3.77848e-15
    50 | 5 | 0.2 | 1.53082e-10 | 1.53082e-10 | 6.02957e-14
    50 | 5 | 0.3 | 3.03925e-10 | 3.03925e-10 | 3.05034e-13
    50 | 5 | 0.4 | 5.17168e-10 | 5.17168e-10 | 9.66855e-13
    50 | 5 | 0.5 | 7.95847e-10 | 7.95847e-10 | 2.36813e-12
    50 | 5 | 0.6 | 1.14375e-09 | 1.14375e-09 | 4.91512e-12
    50 | 5 | 0.7 | 1.56568e-09 | 1.56568e-09 | 9.12705e-12
    50 | 5 | 0.8 | 2.0677e-09 | 2.0677e-09 | 1.5675e-11
    50 | 5 | 0.9 | 2.6573e-09 | 2.6573e-09 | 2.5304e-11
    50 | 5 | 1 | 3.34377e-09 | 3.34377e-09 | 3.88176e-11
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  tbl2: Table
    // Surface Integration 2
    Voltage | VacAmp | freq (MHz) | abs(acpr.v_tz)^2 (m^4/s^2) | acpr.v_tz^2 (m^4/s^2) | 1 (m^2) | acpr.v_inst^2 (m^4/s^2)
    50 | 5 | 0.1 | 2.9136e-15 | -2.9136e-15+2.17747e-21i | 5.625e-09 | 3.06544e-22
    50 | 5 | 0.2 | 1.17293e-14 | -1.17293e-14+6.9672e-20i | 5.625e-09 | 7.72363e-20
    50 | 5 | 0.3 | 2.66752e-14 | -2.66752e-14+5.31711e-19i | 5.625e-09 | 1.93734e-18
    50 | 5 | 0.4 | 4.81441e-14 | -4.81441e-14+2.26561e-18i | 5.625e-09 | 1.89146e-17
    50 | 5 | 0.5 | 7.67124e-14 | -7.67124e-14+7.01082e-18i | 5.625e-09 | 1.09338e-16
    50 | 5 | 0.6 | 1.1317e-13 | -1.1317e-13+1.7693e-17i | 5.625e-09 | 4.49972e-16
    50 | 5 | 0.7 | 1.58562e-13 | -1.58562e-13+3.89388e-17i | 5.625e-09 | 1.46935e-15
    50 | 5 | 0.8 | 2.14248e-13 | -2.14248e-13+7.78473e-17i | 5.625e-09 | 4.06754e-15
    50 | 5 | 0.9 | 2.81981e-13 | -2.81981e-13+1.44401e-16i | 5.625e-09 | 9.85718e-15
    50 | 5 | 1 | 3.64021e-13 | -3.64021e-13+2.5213e-16i | 5.625e-09 | 2.13667e-14
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  tbl3: Table
    // Surface Integration 1
    Voltage | VacAmp | freq (MHz) | Intensity, z-component (W)
    50 | 5 | 0.1 | 3.77848e-15
    50 | 5 | 0.2 | 6.02957e-14
    50 | 5 | 0.3 | 3.05034e-13
    50 | 5 | 0.4 | 9.66855e-13
    50 | 5 | 0.5 | 2.36813e-12
    50 | 5 | 0.6 | 4.91512e-12
    50 | 5 | 0.7 | 9.12705e-12
    50 | 5 | 0.8 | 1.5675e-11
    50 | 5 | 0.9 | 2.5304e-11
    50 | 5 | 1 | 3.88176e-11
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  tbl4: Table
    // Surface Integration 1
    Voltage | VacAmp | freq (MHz) | Intensity, z-component (W)
    50 | 5 | 0.112202 | 5.93635e-15
    50 | 5 | 0.158489 | 2.36818e-14
    50 | 5 | 0.223872 | 9.44282e-14
    50 | 5 | 0.316228 | 3.76565e-13
    50 | 5 | 0.446684 | 1.50283e-12
    50 | 5 | 0.630957 | 6.01125e-12
    50 | 5 | 0.891251 | 2.42264e-11
    50 | 5 | 1.25893 | 1.00533e-10
    50 | 5 | 1.77828 | 4.7162e-10
    50 | 5 | 2.51189 | 4.49545e-09
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  tbl5: Table
    // Surface Integration 2
    Voltage | VacAmp | freq (MHz) | abs(acpr.v_tz)^2 (m^4/s^2) | acpr.v_tz^2 (m^4/s^2) | 1 (m^2) | acpr.v_inst^2 (m^4/s^2)
    50 | 5 | 0.112202 | 3.66473e-15 | -3.66473e-15+3.8377e-21i | 5.625e-09 | 8.79435e-22
    50 | 5 | 0.158489 | 7.33166e-15 | -7.33166e-15+2.16463e-20i | 5.625e-09 | 1.2482e-20
    50 | 5 | 0.223872 | 1.47069e-14 | -1.47069e-14+1.22238e-19i | 5.625e-09 | 1.90789e-19
    50 | 5 | 0.316228 | 2.966e-14 | -2.966e-14+6.92525e-19i | 5.625e-09 | 2.95307e-18
    50 | 5 | 0.446684 | 6.04668e-14 | -6.04668e-14+3.95021e-18i | 5.625e-09 | 4.50683e-17
    50 | 5 | 0.630957 | 1.26027e-13 | -1.26027e-13+2.28597e-17i | 5.625e-09 | 6.63687e-16
    50 | 5 | 0.891251 | 2.75116e-13 | -2.75116e-13+1.36687e-16i | 5.625e-09 | 9.11361e-15
    50 | 5 | 1.25893 | 6.6526e-13 | -6.6526e-13+8.88857e-16i | 5.625e-09 | 1.10723e-13
    50 | 5 | 1.77828 | 2.07864e-12 | -2.07862e-12+7.46387e-15i | 5.625e-09 | 1.13809e-12
    50 | 5 | 2.51189 | 1.66315e-11 | -1.66302e-11+2.03446e-13i | 5.625e-09 | 1.42798e-11
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  tbl6: Table
    // Surface Integration 3
    Voltage | VacAmp | freq (MHz) | 0.5*imag(conj(acpr.v_tz)*acpr.p_t) (W) | 0.5*real(conj(acpr.v_tz)*acpr.p_t) (W) | Intensity, z-component (W)
    50 | 5 | 0.112202 | 8.47272e-14 | 5.93562e-15 | 5.93562e-15
    50 | 5 | 0.158489 | 2.38564e-13 | 2.36789e-14 | 2.36789e-14
    50 | 5 | 0.223872 | 6.70953e-13 | 9.44167e-14 | 9.44167e-14
    50 | 5 | 0.316228 | 1.88278e-12 | 3.76519e-13 | 3.76519e-13
    50 | 5 | 0.446684 | 5.2601e-12 | 1.50265e-12 | 1.50265e-12
    50 | 5 | 0.630957 | 1.45734e-11 | 6.01053e-12 | 6.01053e-12
    50 | 5 | 0.891251 | 3.97966e-11 | 2.42236e-11 | 2.42236e-11
    50 | 5 | 1.25893 | 1.06592e-10 | 1.00522e-10 | 1.00522e-10
    50 | 5 | 1.77828 | 2.86521e-10 | 4.71571e-10 | 4.71571e-10
    50 | 5 | 2.51189 | 1.13823e-09 | 4.495e-09 | 4.495e-09
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  tbl7: Table
    // Surface Integration 4
    Voltage | VacAmp | freq (MHz) | abs(acpr.v_tz) (m^3/s) | 1 (m^2)
    50 | 5 | 0.112202 | 3.27414e-12 | 5.625e-09
    50 | 5 | 0.158489 | 4.63088e-12 | 5.625e-09
    50 | 5 | 0.223872 | 6.55836e-12 | 5.625e-09
    50 | 5 | 0.316228 | 9.31242e-12 | 5.625e-09
    50 | 5 | 0.446684 | 1.3293e-11 | 5.625e-09
    50 | 5 | 0.630957 | 1.9181e-11 | 5.625e-09
    50 | 5 | 0.891251 | 2.83102e-11 | 5.625e-09
    50 | 5 | 1.25893 | 4.393e-11 | 5.625e-09
    50 | 5 | 1.77828 | 7.73158e-11 | 5.625e-09
    50 | 5 | 2.51189 | 2.16703e-10 | 5.625e-09
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
Plots
  pg1: PlotGroup3D "Acoustic Pressure (acpr)" | data = dset3
    surf1: Surface | expr = acpr.p_t
  pg2: PlotGroup3D "Sound Pressure Level (acpr)" | data = dset3
    surf1: Surface | expr = acpr.Lp_t
  pg3: PlotGroup3D "Acoustic Pressure, Isosurfaces (acpr)" | data = dset3
    iso1: Isosurface | expr = acpr.p_t
  pg4: PlotGroup3D "Displacement (solid)" | data = dset3
    vol1: Volume | expr = solid.disp
  pg5: PlotGroup3D "Electric Potential (es)" | data = dset3
    mslc1: Multislice
      expr = V
      multiplanexmethod = coord
      xcoord = es.CPx
      multiplaneymethod = coord
      ycoord = es.CPy
      multiplanezmethod = coord
      zcoord = es.CPz
    strmsl1: StreamlineMultislice
      expr = {es.Ex, es.Ey, es.Ez}
      multiplanexmethod = coord
      xcoord = es.CPx
      multiplaneymethod = coord
      ycoord = es.CPy
      multiplanezmethod = coord
      zcoord = es.CPz
      udist = 0.02
      col1: Color "Color Expression 1" | expr = V
      filt1: Filter | expr = !isScalingSystemDomain
  pg6: PlotGroup3D "Electric Field Norm (es)" | data = dset3
    mslc1: Multislice
      expr = es.normE
      multiplanexmethod = coord
      xcoord = es.CPx
      multiplaneymethod = coord
      ycoord = es.CPy
      multiplanezmethod = coord
      zcoord = es.CPz
    strmsl1: StreamlineMultislice
      expr = {es.Ex, es.Ey, es.Ez}
      multiplanexmethod = coord
      xcoord = es.CPx
      multiplaneymethod = coord
      ycoord = es.CPy
      multiplanezmethod = coord
      zcoord = es.CPz
      udist = 0.02
      col1: Color "Color Expression 1" | expr = es.normE
      filt1: Filter | expr = !isScalingSystemDomain
  pg7: PlotGroup3D "Displacement (solid) 1" | data = dset3
    surf1: Surface | expr = acpr.v_tz; descr = Total acoustic velocity, z-component; evalmethod = lintotal
      sel1: Selection on boundaries 15
  pg8: PlotGroup3D "3D Plot Group 8" | data = cpl1
    surf1: Surface | expr = acpr.Iz; descr = Intensity, z-component
  pg9: PlotGroup3D "Displacement (solid) 1.1" on boundaries 15 | data = dset3
    surf1: Surface | expr = solid.u_tZ; descr = Velocity, Z-component
      sel1: Selection on boundaries 15

Exports
  plot1: Plot
  data1: Data
    data = cpl1
    expr = acpr.Iz
    unit = W/m^2
    descr = Intensity, z-component
    evalmethod = lintotal
    filename = C:\Users\khora\OneDrive\Documents\3D_CMUT_withMedium_sq_intensity_z_InstSol.txt
  tbl1: Table
    table = tbl1
    filename = C:\Users\khora\OneDrive\Documents\3D_CMUT_Sq_CMUT_Power_TotalInstSoln.txt
    prec = manual
  tbl2: Table | table = tbl2; filename = C:\Users\khora\OneDrive\Documents\3D_CMUT_Sq_Vsquared.txt; prec = manual
  tbl3: Table | table = tbl3; filename = C:\Users\khora\OneDrive\Documents\3D_CMUT_Sq_Power.txt; prec = manual
  tbl4: Table | table = tbl4; filename = C:\Users\khora\OneDrive\Documents\3D_CMUT_Sq_Power_HF.txt; prec = manual
  tbl5: Table | table = tbl5; filename = C:\Users\khora\OneDrive\Documents\3D_CMUT_Sq_Vsquared_HF.txt; prec = manual
  tbl6: Table | table = tbl6; filename = C:\Users\khora\OneDrive\Documents\3D_CMUT_Sq_Power_updated.txt; prec = manual
  tbl7: Table | table = tbl7; filename = C:\Users\khora\OneDrive\Documents\3D_CMUT_Sq_Vavg2.txt; prec = manual